l1 := 0.375
w := 0.1
R := 0.15
μ := 0.998
h := 0.2
fi := (π*45)/180
N3 := 334
N1 := 2*N3 = 668
l3 := 1 - R = 0.85
l2 := (l1 + R)*cos(fi) = 0.371231
mg := 2000
m1 := 9.7
m1g := m1*9.8 = 95.06
Mp := (m1g*l1*cos(fi))/2 + (N1*l1*cos(fi))/2 + μ*N1*(R + (l1*cos(fi)/2)*sin(fi)) = 263.668
Np := Mp*w = 26.3668
n := 0.8
Npreal := 1.5*Np/n = 49.4377
Md := ((μ*N3*h + N3*l3 + μ*N1*h + N1*l2 - mg*l2 + Mp)/3) = 84.3624
Nd := Md*w = 8.43624
Ndreal := 3*Nd/n = 31.6359
